# OpenSim document version 30000
Model heremans-prosthesis:
  length_units: meters
  force_units: N
  gravity: 0 -9.8066 0
  credits:
    Design created by Francois Heremans. Ported to OpenSim by Daniel Gordon.
  BodySet:
    Body ground: mass=0 mass_center=(0 0 0) inertia_xx=0 inertia_yy=0 inertia_zz=0
    Body adapter: mass=0.99 mass_center=(-0.0440147 0.137154 0.0486122) inertia_xx=0.04789311 inertia_yy=0.04907142
        inertia_zz=0.009595415 inertia_xy=0.009272274 inertia_xz=-0.003226591 inertia_yz=0.01029225 meshes=adapter.stl
      WeldJoint ground_adapter: parent_body=ground location_in_parent=(0 0 0) location=(0 0 0)
    Body shank: mass=0.59 mass_center=(-0.0042203 -0.129319 0) inertia_xx=0.02161997 inertia_yy=0.0002990548
        inertia_zz=0.02162341 inertia_xy=0.0005851441 meshes=Ankle_nylon_epfl_shank.STL
      CustomJoint adapter_shank: parent_body=adapter location_in_parent=(-0.065 0.155 0.1) location=(0 0 0)
        Coordinate shank_ty: motion_type=translational default_value=0 range=(-5 5) clamped=false
        SpatialTransform: axes_held_at_zero=(rotation1 rotation2 rotation3 translation1 translation3)
          TransformAxis translation2: coordinates=shank_ty axis=(0 1 0) LinearFunction(coefficients=1 0)
    Body foot: mass=1 mass_center=(0.075524 -0.0330662 0) inertia_xx=1.923815e-6 inertia_yy=1.222625e-5
        inertia_zz=1.11191e-5 inertia_xy=-2.707764e-6 meshes=Ankle_nylon_epfl_foot.STL
      CustomJoint shank_foot: parent_body=shank location_in_parent=(-0.0025 -0.2253 0) location=(0 0 0)
        Coordinate foot_rz: motion_type=rotational default_value=0 range=(-5 5) clamped=false
        SpatialTransform: axes_held_at_zero=(rotation1 rotation2 translation1 translation2 translation3)
          TransformAxis rotation3: coordinates=foot_rz axis=(0 0 1) LinearFunction(coefficients=1 0)
