# OpenSim document version 30000
Model XoR2-Human:
  length_units: meters
  force_units: N
  gravity: 0 -9.80665 0
  credits:
    Delp S.L., Loan J.P., Hoy M.G., Zajac F.E., Topp E.L., Rosen J.M., Thelen D.G., Anderson F.C., Seth A. Notes: 3D, 23 DOF gait model created by D.G. Thelen, Univ. of Wisconsin-Madison, and Ajay Seth, Frank C. Anderson, and Scott L. Delp, Stanford University. Lower extremity joint defintions based on Delp et al. (1990). Low back joint and anthropometry based on Anderson and Pandy (1999, 2001). Planar knee model of Yamaguchi and Zajac (1989). Seth replaced tibia translation constraints with a CustomJoint for the knee and removed the patella to eliminate all kinematic constraints; insertions of the quadrucepts are handled with moving points in the tibia frame as defined by Delp 1990. License: Creative Commons (CCBY 3.0). You are free to distribute, remix, tweak, and build upon this work, even commercially, as long as you credit us for the original creation. http://creativecommons.org/licenses/by/3.0/ More Information: http://simtk-confluence.stanford.edu:8080/display/OpenSim/Gait+2392+and+2354+Models
  publications:
    Delp, S.L., Loan, J.P., Hoy, M.G., Zajac, F.E., Topp E.L., Rosen, J.M.: An interactive graphics-based model of the lower extremity to study orthopaedic surgical procedures, IEEE Transactions on Biomedical Engineering, vol. 37, pp. 757-767, 1990. Yamaguchi G.T., Zajac F.E.: A planar model of the knee joint to characterize the knee extensor mechanism." J . Biomecl7. vol. 21. pp. 1-10. 1989. Anderson F.C., Pandy M.G.: A dynamic optimization solution for vertical jumping in three dimensions. Computer Methods in Biomechanics and Biomedical Engineering 2:201-231, 1999. Anderson F.C., Pandy M.G.: Dynamic optimization of human walking. Journal of Biomechanical Engineering 123:381-390, 2001.
  BodySet:
    Body ground: mass=0 mass_center=(0 0 0) inertia_xx=0 inertia_yy=0 inertia_zz=0 meshes=treadmill.vtp
    Body back: mass=3.981076 mass_center=(0.0708701 -0.141249 -2.848e-5) inertia_xx=-0.1196586 inertia_yy=0.05364227
        inertia_zz=0.1266665 inertia_xy=-0.03199447 inertia_xz=5.27e-6 inertia_yz=-3.11e-6 meshes=back.stl
      CustomJoint ground_back: parent_body=ground location_in_parent=(0 0 0) location=(0 0 0)
        Coordinate back_tilt: motion_type=rotational default_value=-0.05026434 range=(-1.570796 1.570796) clamped=false
        Coordinate back_list: motion_type=rotational default_value=-0.01126894 range=(-1.570796 1.570796) clamped=false
        Coordinate back_rotation: motion_type=rotational default_value=-0.05152985 range=(-1.570796 1.570796)
            clamped=false
        Coordinate back_tx: motion_type=translational default_value=0.03977249 range=(-5 5) clamped=false
        Coordinate back_ty: motion_type=translational default_value=0.9722295 range=(-1 2) clamped=false
        Coordinate back_tz: motion_type=translational default_value=-0.02879545 range=(-3 3) clamped=false
        SpatialTransform:
          TransformAxis rotation1: coordinates=back_tilt axis=(0 0 1) LinearFunction(coefficients=1 0)
          TransformAxis rotation2: coordinates=back_list axis=(1 0 0) LinearFunction(coefficients=1 0)
          TransformAxis rotation3: coordinates=back_rotation axis=(0 1 0) LinearFunction(coefficients=1 0)
          TransformAxis translation1: coordinates=back_tx axis=(1 0 0) LinearFunction(coefficients=1 0)
          TransformAxis translation2: coordinates=back_ty axis=(0 1 0) LinearFunction(coefficients=1 0)
          TransformAxis translation3: coordinates=back_tz axis=(0 0 1) LinearFunction(coefficients=1 0)
    Body link_r: mass=0.08966161 mass_center=(0.00170274 -0.0446501 0.0144736) inertia_xx=7.373e-5 inertia_yy=8.562e-5
        inertia_zz=0.00012021 inertia_xy=-1.392e-5 inertia_xz=2.19e-6 inertia_yz=-1.772e-5 meshes=right-link.stl
      CustomJoint passive_r: parent_body=back location_in_parent=(0.0931172 -0.0997257 0.194) location=(0 0 0)
        Coordinate hip_adduction_r: motion_type=rotational default_value=0 range=(-1.570796 1.570796) clamped=false
        SpatialTransform:
          TransformAxis rotation1: coordinates=hip_adduction_r axis=(1 0 0) LinearFunction(coefficients=1 0)
    Body thigh_r: mass=1.448699 mass_center=(0.00048619 -0.184416 0.0292295) inertia_xx=0.02310115
        inertia_yy=0.00269942 inertia_zz=0.02446539 inertia_xy=0.00061339 inertia_xz=6.64e-6 inertia_yz=-0.00010281
        meshes=right-thigh.stl
      CustomJoint hip_r: parent_body=link_r location_in_parent=(0.015 -0.065 0.01) location=(0 0 0)
        Coordinate hip_flexion_r: motion_type=rotational default_value=0 range=(-1.570796 1.570796) clamped=false
        SpatialTransform:
          TransformAxis rotation3: coordinates=hip_flexion_r axis=(0 0 1) LinearFunction(coefficients=1 0)
    Body shank_r: mass=0.8351127 mass_center=(0.0315478 -0.192321 -0.00893206) inertia_xx=0.01678467
        inertia_yy=0.00226739 inertia_zz=0.0183526 inertia_xy=0.00312197 inertia_xz=-2.412e-5 inertia_yz=-0.0002615
        meshes=right-shank.stl
      CustomJoint knee_r: parent_body=thigh_r location_in_parent=(0 -0.38 0.04) location=(0 0 0)
        Coordinate knee_angle_r: motion_type=rotational default_value=0 range=(-1.570796 1.570796) clamped=false
        SpatialTransform:
          TransformAxis rotation3: coordinates=knee_angle_r axis=(0 0 1) LinearFunction(coefficients=1 0)
    Body foot_r: mass=1.175042 mass_center=(0.0444916 -0.105543 -0.0698363) inertia_xx=0.00391055 inertia_yy=0.00835104
        inertia_zz=0.00832028 inertia_xy=-0.00088946 inertia_xz=-0.00063668 inertia_yz=0.00128741 meshes=right-foot.stl
      CustomJoint ankle_r: parent_body=shank_r location_in_parent=(0 -0.38 -0.005) location=(0 0 0)
        Coordinate ankle_angle_r: motion_type=rotational default_value=0 range=(-1.570796 1.570796) clamped=false
        SpatialTransform:
          TransformAxis rotation3: coordinates=ankle_angle_r axis=(0 0 1) LinearFunction(coefficients=1 0)
    Body link_l: mass=0.08966159 mass_center=(0.00170275 -0.0446501 -0.0144736) inertia_xx=7.373e-5 inertia_yy=8.562e-5
        inertia_zz=0.00012021 inertia_xy=-1.392e-5 inertia_xz=-2.19e-6 inertia_yz=1.772e-5 meshes=left-link.stl
      CustomJoint passive_l: parent_body=back location_in_parent=(0.09311723 -0.09972573 -0.194) location=(0 0 0)
        Coordinate hip_adduction_l: motion_type=rotational default_value=2.244017e-8 range=(-6.283185 6.283185)
            clamped=false
        SpatialTransform: axes_held_at_zero=(translation1 translation2 translation3)
          TransformAxis rotation1: axis=(0 0 1) LinearFunction(coefficients=0 0)
          TransformAxis rotation2: coordinates=hip_adduction_l axis=(1 0 0) LinearFunction(coefficients=1 0)
          TransformAxis rotation3: axis=(0 1 0) LinearFunction(coefficients=0 0)
    Body thigh_l: mass=1.29348 mass_center=(0.0004862 -0.184415 0.0295044) inertia_xx=0.02062602 inertia_yy=0.0024102
        inertia_zz=0.02184409 inertia_xy=0.00054767 inertia_xz=-5.93e-6 inertia_yz=9.18e-5 meshes=left-thigh.stl
      CustomJoint hip_l: parent_body=link_l location_in_parent=(0.015 -0.065 -0.01) location=(0 0 0)
        Coordinate hip_flexion_l: motion_type=rotational default_value=0 range=(-1.570796 1.570796) clamped=false
        SpatialTransform:
          TransformAxis rotation3: coordinates=hip_flexion_l axis=(0 0 1) LinearFunction(coefficients=1 0)
    Body shank_l: mass=0.8351123 mass_center=(0.0315476 -0.192321 -0.00893209) inertia_xx=0.01678466
        inertia_yy=0.00226739 inertia_zz=0.01835259 inertia_xy=0.00312197 inertia_xz=2.412e-5 inertia_yz=0.0002615
        meshes=left-shank.stl
      CustomJoint knee_l: parent_body=thigh_l location_in_parent=(0 -0.38 -0.04) location=(0 0 0)
        Coordinate knee_angle_l: motion_type=rotational default_value=0 range=(-1.570796 1.570796) clamped=false
        SpatialTransform:
          TransformAxis rotation3: coordinates=knee_angle_l axis=(0 0 1) LinearFunction(coefficients=1 0)
    Body foot_l: mass=1.175041 mass_center=(0.0444917 -0.105543 0.0689863) inertia_xx=0.00391055 inertia_yy=0.00835104
        inertia_zz=0.00832028 inertia_xy=-0.00088946 inertia_xz=0.00063668 inertia_yz=-0.00128741 meshes=left-foot.stl
      CustomJoint ankle_l: parent_body=shank_l location_in_parent=(0 -0.38 0.005) location=(0 0 0)
        Coordinate ankle_angle_l: motion_type=rotational default_value=0 range=(-1.570796 1.570796) clamped=false
        SpatialTransform:
          TransformAxis rotation3: coordinates=ankle_angle_l axis=(0 0 1) LinearFunction(coefficients=1 0)
