# OpenSim document version 40000
Model XoR:
  gravity: 0 -9.80665 0
  length_units: meters
  force_units: N
  credits:
    Delp S.L., Loan J.P., Hoy M.G., Zajac F.E., Topp E.L., Rosen J.M., Thelen D.G., Anderson F.C., Seth A. Notes: 3D, 23 DOF gait model created by D.G. Thelen, Univ. of Wisconsin-Madison, and Ajay Seth, Frank C. Anderson, and Scott L. Delp, Stanford University. Lower extremity joint defintions based on Delp et al. (1990). Low back joint and anthropometry based on Anderson and Pandy (1999, 2001). Planar knee model of Yamaguchi and Zajac (1989). Seth replaced tibia translation constraints with a CustomJoint for the knee and removed the patella to eliminate all kinematic constraints; insertions of the quadrucepts are handled with moving points in the tibia frame as defined by Delp 1990. License: Creative Commons (CCBY 3.0). You are free to distribute, remix, tweak, and build upon this work, even commercially, as long as you credit us for the original creation. http://creativecommons.org/licenses/by/3.0/ More Information: http://simtk-confluence.stanford.edu:8080/display/OpenSim/Gait+2392+and+2354+Models
  publications:
    Delp, S.L., Loan, J.P., Hoy, M.G., Zajac, F.E., Topp E.L., Rosen, J.M.: An interactive graphics-based model of the lower extremity to study orthopaedic surgical procedures, IEEE Transactions on Biomedical Engineering, vol. 37, pp. 757-767, 1990. Yamaguchi G.T., Zajac F.E.: A planar model of the knee joint to characterize the knee extensor mechanism." J . Biomecl7. vol. 21. pp. 1-10. 1989. Anderson F.C., Pandy M.G.: A dynamic optimization solution for vertical jumping in three dimensions. Computer Methods in Biomechanics and Biomedical Engineering 2:201-231, 1999. Anderson F.C., Pandy M.G.: Dynamic optimization of human walking. Journal of Biomechanical Engineering 123:381-390, 2001.
  Ground: meshes=treadmill.vtp
  BodySet:
    Body XoR_back: mass=3.981076 [kg] mass_center=(0.0708701 -0.141249 -2.848e-5)
        inertia=(-0.119659 0.0536423 0.126667 -0.0319945 5.27e-6 -3.11e-6) meshes=back.stl
    Body XoR_link_r: mass=0.08966161 mass_center=(0.00170274 -0.0446501 0.0144736)
        inertia=(7.373e-5 8.562e-5 0.00012021 -1.392e-5 2.19e-6 -1.772e-5) meshes=right-link.stl
    Body XoR_thigh_r: mass=1.448699 mass_center=(0.00048619 -0.184416 0.0292295)
        inertia=(0.0231012 0.00269942 0.0244654 0.00061339 6.64e-6 -0.00010281) meshes=right-thigh.stl
    Body XoR_shank_r: mass=0.8351127 mass_center=(0.0315478 -0.192321 -0.00893206)
        inertia=(0.0167847 0.00226739 0.0183526 0.00312197 -2.412e-5 -0.0002615) meshes=right-shank.stl
    Body XoR_foot_r: mass=1.175042 mass_center=(0.0444916 -0.105543 -0.0698363)
        inertia=(0.00391055 0.00835104 0.00832028 -0.00088946 -0.00063668 0.00128741) meshes=right-foot.stl
    Body XoR_link_l: mass=0.08966159 mass_center=(0.00170275 -0.0446501 -0.0144736)
        inertia=(7.373e-5 8.562e-5 0.00012021 -1.392e-5 -2.19e-6 1.772e-5) meshes=left-link.stl
    Body XoR_thigh_l: mass=1.29348 mass_center=(0.0004862 -0.184415 0.0295044)
        inertia=(0.020626 0.0024102 0.0218441 0.00054767 -5.93e-6 9.18e-5) meshes=left-thigh.stl
    Body XoR_shank_l: mass=0.8351123 mass_center=(0.0315476 -0.192321 -0.00893209)
        inertia=(0.0167847 0.00226739 0.0183526 0.00312197 2.412e-5 0.0002615) meshes=left-shank.stl
    Body XoR_foot_l: mass=1.175041 mass_center=(0.0444917 -0.105543 0.0689863)
        inertia=(0.00391055 0.00835104 0.00832028 -0.00088946 0.00063668 -0.00128741) meshes=left-foot.stl
  JointSet:
    CustomJoint ground_XoR_back: socket_parent_frame=ground_offset socket_child_frame=XoR_back_offset
      Coordinate XoR_back_tilt: default_value=0 range=(-1.570796 1.570796) clamped=false locked=true
      Coordinate XoR_back_list: default_value=0 range=(-1.570796 1.570796) clamped=false locked=true
      Coordinate XoR_back_rotation: default_value=0 range=(-1.570796 1.570796) clamped=false locked=true
      Coordinate XoR_back_tx: default_value=0 range=(-5 5) clamped=false locked=true
      Coordinate XoR_back_ty: default_value=1.1 range=(-1 2) clamped=false locked=true
      Coordinate XoR_back_tz: default_value=0 range=(-3 3) clamped=false locked=true
      PhysicalOffsetFrame ground_offset: socket_parent=/ground translation=(0 0 0) [meters]
      PhysicalOffsetFrame XoR_back_offset: socket_parent=/bodyset/XoR_back translation=(0 0 0)
      SpatialTransform:
        TransformAxis rotation1: coordinates=XoR_back_tilt axis=(0 0 1) LinearFunction(coefficients=1 0)
        TransformAxis rotation2: coordinates=XoR_back_list axis=(1 0 0) LinearFunction(coefficients=1 0)
        TransformAxis rotation3: coordinates=XoR_back_rotation axis=(0 1 0) LinearFunction(coefficients=1 0)
        TransformAxis translation1: coordinates=XoR_back_tx axis=(1 0 0) LinearFunction(coefficients=1 0)
        TransformAxis translation2: coordinates=XoR_back_ty axis=(0 1 0) LinearFunction(coefficients=1 0)
        TransformAxis translation3: coordinates=XoR_back_tz axis=(0 0 1) LinearFunction(coefficients=1 0)
    CustomJoint XoR_back_XoR_link_r: socket_parent_frame=XoR_back_offset socket_child_frame=XoR_link_r_offset
      Coordinate XoR_hip_adduction_r: default_value=0 range=(-1.570796 1.570796) clamped=false
      PhysicalOffsetFrame XoR_back_offset: socket_parent=/bodyset/XoR_back translation=(0.0931172 -0.0997257 0.194)
      PhysicalOffsetFrame XoR_link_r_offset: socket_parent=/bodyset/XoR_link_r translation=(0 0 0)
      SpatialTransform:
        TransformAxis rotation1: coordinates=XoR_hip_adduction_r axis=(1 0 0) LinearFunction(coefficients=1 0)
        TransformAxis rotation2: axis=(0 1 0)
        TransformAxis rotation3: axis=(0 0 1)
        TransformAxis translation1: axis=(1 0 0)
        TransformAxis translation2: axis=(0 1 0)
        TransformAxis translation3: axis=(0 0 1)
    CustomJoint XoR_link_r_XoR_thigh_r: socket_parent_frame=XoR_link_r_offset socket_child_frame=XoR_thigh_r_offset
      Coordinate XoR_hip_flexion_r: default_value=0 range=(-1.570796 1.570796) clamped=false
      PhysicalOffsetFrame XoR_link_r_offset: socket_parent=/bodyset/XoR_link_r translation=(0.015 -0.065 0.01)
      PhysicalOffsetFrame XoR_thigh_r_offset: socket_parent=/bodyset/XoR_thigh_r translation=(0 0 0)
      SpatialTransform:
        TransformAxis rotation1: axis=(1 0 0)
        TransformAxis rotation2: axis=(0 1 0)
        TransformAxis rotation3: coordinates=XoR_hip_flexion_r axis=(0 0 1) LinearFunction(coefficients=1 0)
        TransformAxis translation1: axis=(1 0 0)
        TransformAxis translation2: axis=(0 1 0)
        TransformAxis translation3: axis=(0 0 1)
    CustomJoint XoR_thigh_r_XoR_shank_r: socket_parent_frame=XoR_thigh_r_offset socket_child_frame=XoR_shank_r_offset
      Coordinate XoR_knee_angle_r: default_value=0 range=(-1.570796 1.570796) clamped=false
      PhysicalOffsetFrame XoR_thigh_r_offset: socket_parent=/bodyset/XoR_thigh_r translation=(0 -0.38 0.04)
      PhysicalOffsetFrame XoR_shank_r_offset: socket_parent=/bodyset/XoR_shank_r translation=(0 0 0)
      SpatialTransform:
        TransformAxis rotation1: axis=(1 0 0)
        TransformAxis rotation2: axis=(0 1 0)
        TransformAxis rotation3: coordinates=XoR_knee_angle_r axis=(0 0 1) LinearFunction(coefficients=1 0)
        TransformAxis translation1: axis=(1 0 0)
        TransformAxis translation2: axis=(0 1 0)
        TransformAxis translation3: axis=(0 0 1)
    CustomJoint XoR_shank_r_XoR_foot_r: socket_parent_frame=XoR_shank_r_offset socket_child_frame=XoR_foot_r_offset
      Coordinate XoR_ankle_angle_r: default_value=0 range=(-1.570796 1.570796) clamped=false
      PhysicalOffsetFrame XoR_shank_r_offset: socket_parent=/bodyset/XoR_shank_r translation=(0 -0.38 -0.005)
      PhysicalOffsetFrame XoR_foot_r_offset: socket_parent=/bodyset/XoR_foot_r translation=(0 0 0)
      SpatialTransform:
        TransformAxis rotation1: axis=(1 0 0)
        TransformAxis rotation2: axis=(0 1 0)
        TransformAxis rotation3: coordinates=XoR_ankle_angle_r axis=(0 0 1) LinearFunction(coefficients=1 0)
        TransformAxis translation1: axis=(1 0 0)
        TransformAxis translation2: axis=(0 1 0)
        TransformAxis translation3: axis=(0 0 1)
    CustomJoint XoR_back_XoR_link_l: socket_parent_frame=XoR_back_offset socket_child_frame=XoR_link_l_offset
      Coordinate XoR_hip_adduction_l: default_value=2.244017e-8 range=(-6.283185 6.283185) clamped=false
      PhysicalOffsetFrame XoR_back_offset: socket_parent=/bodyset/XoR_back translation=(0.0931172 -0.0997257 -0.194)
      PhysicalOffsetFrame XoR_link_l_offset: socket_parent=/bodyset/XoR_link_l translation=(0 0 0)
      SpatialTransform: axes_held_at_zero=(translation1 translation2 translation3)
        TransformAxis rotation1: axis=(0 0 1) LinearFunction(coefficients=0 0)
        TransformAxis rotation2: coordinates=XoR_hip_adduction_l axis=(1 0 0) LinearFunction(coefficients=1 0)
        TransformAxis rotation3: axis=(0 1 0) LinearFunction(coefficients=0 0)
    CustomJoint XoR_link_l_XoR_thigh_l: socket_parent_frame=XoR_link_l_offset socket_child_frame=XoR_thigh_l_offset
      Coordinate XoR_hip_flexion_l: default_value=0 range=(-1.570796 1.570796) clamped=false
      PhysicalOffsetFrame XoR_link_l_offset: socket_parent=/bodyset/XoR_link_l translation=(0.015 -0.065 -0.01)
      PhysicalOffsetFrame XoR_thigh_l_offset: socket_parent=/bodyset/XoR_thigh_l translation=(0 0 0)
      SpatialTransform:
        TransformAxis rotation1: axis=(1 0 0)
        TransformAxis rotation2: axis=(0 1 0)
        TransformAxis rotation3: coordinates=XoR_hip_flexion_l axis=(0 0 1) LinearFunction(coefficients=1 0)
        TransformAxis translation1: axis=(1 0 0)
        TransformAxis translation2: axis=(0 1 0)
        TransformAxis translation3: axis=(0 0 1)
    CustomJoint XoR_thigh_l_XoR_shank_l: socket_parent_frame=XoR_thigh_l_offset socket_child_frame=XoR_shank_l_offset
      Coordinate XoR_knee_angle_l: default_value=0 range=(-1.570796 1.570796) clamped=false
      PhysicalOffsetFrame XoR_thigh_l_offset: socket_parent=/bodyset/XoR_thigh_l translation=(0 -0.38 -0.04)
      PhysicalOffsetFrame XoR_shank_l_offset: socket_parent=/bodyset/XoR_shank_l translation=(0 0 0)
      SpatialTransform:
        TransformAxis rotation1: axis=(1 0 0)
        TransformAxis rotation2: axis=(0 1 0)
        TransformAxis rotation3: coordinates=XoR_knee_angle_l axis=(0 0 1) LinearFunction(coefficients=1 0)
        TransformAxis translation1: axis=(1 0 0)
        TransformAxis translation2: axis=(0 1 0)
        TransformAxis translation3: axis=(0 0 1)
    CustomJoint XoR_shank_l_XoR_foot_l: socket_parent_frame=XoR_shank_l_offset socket_child_frame=XoR_foot_l_offset
      Coordinate XoR_ankle_angle_l: default_value=0 range=(-1.570796 1.570796) clamped=false
      PhysicalOffsetFrame XoR_shank_l_offset: socket_parent=/bodyset/XoR_shank_l translation=(0 -0.38 0.005)
      PhysicalOffsetFrame XoR_foot_l_offset: socket_parent=/bodyset/XoR_foot_l translation=(0 0 0)
      SpatialTransform:
        TransformAxis rotation1: axis=(1 0 0)
        TransformAxis rotation2: axis=(0 1 0)
        TransformAxis rotation3: coordinates=XoR_ankle_angle_l axis=(0 0 1) LinearFunction(coefficients=1 0)
        TransformAxis translation1: axis=(1 0 0)
        TransformAxis translation2: axis=(0 1 0)
        TransformAxis translation3: axis=(0 0 1)
  ForceSet:
    CoordinateActuator hip_motor_r: coordinate=XoR_hip_flexion_r optimal_force=10
    CoordinateActuator knee_motor_r: coordinate=XoR_knee_angle_r optimal_force=10
    CoordinateActuator ankle_motor_r: coordinate=XoR_ankle_angle_r optimal_force=10
    CoordinateActuator hip_motor_l: coordinate=XoR_hip_flexion_l optimal_force=10
    CoordinateActuator knee_motor_l: coordinate=XoR_knee_angle_l optimal_force=10
    CoordinateActuator ankle_motor_l: coordinate=XoR_ankle_angle_l optimal_force=10
