# OpenSim document version 30000
CMCTool XoR2-Human:
  model_file: leg6dof9musc.osim
  replace_force_set: false
  force_set_files: gait2392_XoR2_CMC_Actuators.xml
  results_directory: CMC_TuningBushings
  output_precision: 8
  initial_time: 0.34
  final_time: 1.45
  solve_for_equilibrium_for_auxiliary_states: true
  maximum_number_of_integrator_steps: 20000
  maximum_integrator_step_size: 1
  minimum_integrator_step_size: 1e-8
  integrator_error_tolerance: 1e-5
  external_loads_file: testGRF.xml
  desired_kinematics_file: testIK_ATR_changes.sto
  task_set_file: gait2392_XoR2_CMC_Tasks.xml
  lowpass_cutoff_frequency: -1
  cmc_time_window: 0.01
  use_fast_optimization_target: true
  optimizer_algorithm: ipopt
  numerical_derivative_step_size: 0.0001
  optimization_convergence_tolerance: 0.0001
  optimizer_max_iterations: 1000
  optimizer_print_level: 3
  use_verbose_printing: false
  AnalysisSet Analyses:
    ProbeReporter MetabolicsReporter
    ForceReporter: start_time=-infinity end_time=infinity step_interval=1 in_degrees=true
        include_constraint_forces=false
