# OpenSim document version 30000
AnalyzeTool XoR2-Human:
  replace_force_set: false
  force_set_files: gait2392_XoR2_CMC_Actuators.xml
  results_directory: .
  output_precision: 8
  initial_time: 0
  final_time: 1
  solve_for_equilibrium_for_auxiliary_states: false
  maximum_number_of_integrator_steps: 20000
  maximum_integrator_step_size: 1
  minimum_integrator_step_size: 1e-8
  integrator_error_tolerance: 1e-5
  external_loads_file: testGRF.xml
  states_file: ../Data/BruteForceFullSearch/thigh=0.5shank=4/CMC/XoR2-Human_states.sto
  lowpass_cutoff_frequency_for_coordinates: -1
  AnalysisSet Analyses:
    ForceReporter: start_time=0 end_time=1 step_interval=1 in_degrees=true include_constraint_forces=false
