# OpenSim document version 40000
Model 3DGaitModel2392:
  gravity: 0 -9.80665 0
  length_units: meters
  force_units: N
  credits:
    Delp S.L., Loan J.P., Hoy M.G., Zajac F.E., Topp E.L., Rosen J.M., Thelen D.G., Anderson F.C., Seth A. Notes: 3D, 23 DOF gait model created by D.G. Thelen, Univ. of Wisconsin-Madison, and Ajay Seth, Frank C. Anderson, and Scott L. Delp, Stanford University. Lower extremity joint defintions based on Delp et al. (1990). Low back joint and anthropometry based on Anderson and Pandy (1999, 2001). Planar knee model of Yamaguchi and Zajac (1989). Seth replaced tibia translation constraints with a CustomJoint for the knee and removed the patella to eliminate all kinematic constraints; insertions of the quadrucepts are handled with moving points in the tibia frame as defined by Delp 1990. License: Creative Commons (CCBY 3.0). You are free to distribute, remix, tweak, and build upon this work, even commercially, as long as you credit us for the original creation. http://creativecommons.org/licenses/by/3.0/ More Information: http://simtk-confluence.stanford.edu:8080/display/OpenSim/Gait+2392+and+2354+Models
  publications:
    Delp, S.L., Loan, J.P., Hoy, M.G., Zajac, F.E., Topp E.L., Rosen, J.M.: An interactive graphics-based model of the lower extremity to study orthopaedic surgical procedures, IEEE Transactions on Biomedical Engineering, vol. 37, pp. 757-767, 1990. Yamaguchi G.T., Zajac F.E.: A planar model of the knee joint to characterize the knee extensor mechanism." J . Biomecl7. vol. 21. pp. 1-10. 1989. Anderson F.C., Pandy M.G.: A dynamic optimization solution for vertical jumping in three dimensions. Computer Methods in Biomechanics and Biomedical Engineering 2:201-231, 1999. Anderson F.C., Pandy M.G.: Dynamic optimization of human walking. Journal of Biomechanical Engineering 123:381-390, 2001.
  Ground: meshes=treadmill.vtp
  BodySet:
    Body pelvis: mass=11.777 [kg] mass_center=(-0.0707 0 0) inertia=(0.1028 0.0871 0.0579 0 0 0)
        meshes=(sacrum.vtp pelvis.vtp l_pelvis.vtp)
    Body femur_r: mass=9.3014 mass_center=(0 -0.17 0) inertia=(0.1339 0.0351 0.1412 0 0 0) meshes=femur_r.vtp
    Body tibia_r: mass=3.7075 mass_center=(0 -0.1867 0) inertia=(0.0504 0.0051 0.0511 0 0 0)
        meshes=(tibia_r.vtp fibula.vtp)
    Body talus_r: mass=0.1 mass_center=(0 0 0) inertia=(0.001 0.001 0.001 0 0 0) meshes=talus.vtp
    Body calcn_r: mass=1.25 mass_center=(0.1 0.03 0) inertia=(0.0014 0.0039 0.0041 0 0 0) meshes=foot.vtp
    Body toes_r: mass=0.2166 mass_center=(0.0346 0.006 -0.0175) inertia=(0.0001 0.0002 0.0001 0 0 0) meshes=bofoot.vtp
    Body femur_l: mass=9.3014 mass_center=(0 -0.17 0) inertia=(0.1339 0.0351 0.1412 0 0 0) meshes=femur_l.vtp
    Body tibia_l: mass=3.7075 mass_center=(0 -0.1867 0) inertia=(0.0504 0.0051 0.0511 0 0 0)
        meshes=(tibia_l.vtp l_fibula.vtp)
    Body talus_l: mass=0.1 mass_center=(0 0 0) inertia=(0.001 0.001 0.001 0 0 0) meshes=l_talus.vtp
    Body calcn_l: mass=1.25 mass_center=(0.1 0.03 0) inertia=(0.0014 0.0039 0.0041 0 0 0) meshes=l_foot.vtp
    Body toes_l: mass=0.2166 mass_center=(0.0346 0.006 0.0175) inertia=(0.0001 0.0002 0.0001 0 0 0) meshes=l_bofoot.vtp
    Body torso: mass=34.2366 mass_center=(-0.03 0.32 0) inertia=(1.4745 0.7555 1.4314 0 0 0)
        meshes=(hat_spine.vtp hat_jaw.vtp hat_skull.vtp hat_ribs.vtp)
    Body XoR_back: mass=3.981076 mass_center=(0.0708701 -0.141249 -2.848e-5)
        inertia=(-0.119659 0.0536423 0.126667 -0.0319945 5.27e-6 -3.11e-6) meshes=back.stl
    Body XoR_link_r: mass=0.08966161 mass_center=(0.00170274 -0.0446501 0.0144736)
        inertia=(7.373e-5 8.562e-5 0.00012021 -1.392e-5 2.19e-6 -1.772e-5) meshes=right-link.stl
    Body XoR_thigh_r: mass=1.448699 mass_center=(0.00048619 -0.184416 0.0292295)
        inertia=(0.0231012 0.00269942 0.0244654 0.00061339 6.64e-6 -0.00010281) meshes=right-thigh.stl
    Body XoR_shank_r: mass=0.8351127 mass_center=(0.0315478 -0.192321 -0.00893206)
        inertia=(0.0167847 0.00226739 0.0183526 0.00312197 -2.412e-5 -0.0002615) meshes=right-shank.stl
    Body XoR_foot_r: mass=1.175042 mass_center=(0.0444916 -0.105543 -0.0698363)
        inertia=(0.00391055 0.00835104 0.00832028 -0.00088946 -0.00063668 0.00128741) meshes=right-foot.stl
    Body XoR_link_l: mass=0.08966159 mass_center=(0.00170275 -0.0446501 -0.0144736)
        inertia=(7.373e-5 8.562e-5 0.00012021 -1.392e-5 -2.19e-6 1.772e-5) meshes=left-link.stl
    Body XoR_thigh_l: mass=1.29348 mass_center=(0.0004862 -0.184415 0.0295044)
        inertia=(0.020626 0.0024102 0.0218441 0.00054767 -5.93e-6 9.18e-5) meshes=left-thigh.stl
    Body XoR_shank_l: mass=0.8351123 mass_center=(0.0315476 -0.192321 -0.00893209)
        inertia=(0.0167847 0.00226739 0.0183526 0.00312197 2.412e-5 0.0002615) meshes=left-shank.stl
    Body XoR_foot_l: mass=1.175041 mass_center=(0.0444917 -0.105543 0.0689863)
        inertia=(0.00391055 0.00835104 0.00832028 -0.00088946 0.00063668 -0.00128741) meshes=left-foot.stl
  JointSet:
    WeldJoint XoR_back_pelvis: socket_parent_frame=XoR_back_offset socket_child_frame=pelvis_offset
      PhysicalOffsetFrame XoR_back_offset: socket_parent=/bodyset/XoR_back translation=(0.2 -0.06 0) [meters]
      PhysicalOffsetFrame pelvis_offset: socket_parent=/bodyset/pelvis translation=(0 0 0)
    CustomJoint hip_r: socket_parent_frame=pelvis_offset socket_child_frame=femur_r_offset
      Coordinate hip_flexion_r: default_value=-0.03490659 range=(-2.094395 2.094395) clamped=false
      Coordinate hip_adduction_r: default_value=-0.05235988 range=(-2.094395 2.094395) clamped=false
      Coordinate hip_rotation_r: default_value=0 range=(-2.094395 2.094395) clamped=false
      PhysicalOffsetFrame pelvis_offset: socket_parent=/bodyset/pelvis translation=(-0.0707 -0.0661 0.0835)
      PhysicalOffsetFrame femur_r_offset: socket_parent=/bodyset/femur_r translation=(0 0 0)
      SpatialTransform: axes_held_at_zero=(translation1 translation2 translation3)
        TransformAxis rotation1: coordinates=hip_flexion_r axis=(0 0 1) LinearFunction(coefficients=1 0)
        TransformAxis rotation2: coordinates=hip_adduction_r axis=(1 0 0) LinearFunction(coefficients=1 0)
        TransformAxis rotation3: coordinates=hip_rotation_r axis=(0 1 0) LinearFunction(coefficients=1 0)
    CustomJoint knee_r: socket_parent_frame=femur_r_offset socket_child_frame=tibia_r_offset
      Coordinate knee_angle_r: default_value=0 range=(-2.094395 0.1745329) clamped=false
      PhysicalOffsetFrame femur_r_offset: socket_parent=/bodyset/femur_r translation=(0 0 0)
      PhysicalOffsetFrame tibia_r_offset: socket_parent=/bodyset/tibia_r translation=(0 0 0)
      SpatialTransform: axes_held_at_zero=(rotation2 rotation3 translation3)
        TransformAxis rotation1: coordinates=knee_angle_r axis=(0 0 1) LinearFunction(coefficients=1 0)
        TransformAxis translation1: coordinates=knee_angle_r axis=(1 0 0)
          SimmSpline: x=(-2.0944 -1.74533 -1.39626 -1.0472 -0.698132 -0.349066 -0.174533 0.197344 0.337395 0.490178 1.52146 2.0944)
              y=(-0.0032 0.00179 0.00411 0.0041 0.00212 -0.001 -0.0031 -0.005227 -0.005435 -0.005574 -0.005435 -0.00525)
        TransformAxis translation2: coordinates=knee_angle_r axis=(0 1 0)
          SimmSpline: x=(-2.0944 -1.22173 -0.523599 -0.349066 -0.174533 0.159149 2.0944)
              y=(-0.4226 -0.4082 -0.399 -0.3976 -0.3966 -0.395264 -0.396)
    CustomJoint ankle_r: socket_parent_frame=tibia_r_offset socket_child_frame=talus_r_offset
      Coordinate ankle_angle_r: default_value=0 range=(-1.570796 1.570796) clamped=false
      PhysicalOffsetFrame tibia_r_offset: socket_parent=/bodyset/tibia_r translation=(0 -0.43 0)
      PhysicalOffsetFrame talus_r_offset: socket_parent=/bodyset/talus_r translation=(0 0 0)
      SpatialTransform: axes_held_at_zero=(rotation2 rotation3 translation1 translation2 translation3)
        TransformAxis rotation1: coordinates=ankle_angle_r axis=(-0.1050135 -0.1740224 0.9791263)
            LinearFunction(coefficients=1 0)
    CustomJoint subtalar_r: socket_parent_frame=talus_r_offset socket_child_frame=calcn_r_offset
      Coordinate subtalar_angle_r: default_value=0 range=(-1.570796 1.570796) clamped=false locked=true
      PhysicalOffsetFrame talus_r_offset: socket_parent=/bodyset/talus_r translation=(-0.04877 -0.04195 0.00792)
      PhysicalOffsetFrame calcn_r_offset: socket_parent=/bodyset/calcn_r translation=(0 0 0)
      SpatialTransform: axes_held_at_zero=(rotation2 rotation3 translation1 translation2 translation3)
        TransformAxis rotation1: coordinates=subtalar_angle_r axis=(0.7871796 0.6047475 -0.1209495)
            LinearFunction(coefficients=1 0)
    CustomJoint mtp_r: socket_parent_frame=calcn_r_offset socket_child_frame=toes_r_offset
      Coordinate mtp_angle_r: default_value=0 range=(-1.570796 1.570796) clamped=false locked=true
      PhysicalOffsetFrame calcn_r_offset: socket_parent=/bodyset/calcn_r translation=(0.1788 -0.002 0.00108)
      PhysicalOffsetFrame toes_r_offset: socket_parent=/bodyset/toes_r translation=(0 0 0)
      SpatialTransform: axes_held_at_zero=(rotation2 rotation3 translation1 translation2 translation3)
        TransformAxis rotation1: coordinates=mtp_angle_r axis=(-0.5809544 0 0.8139361) LinearFunction(coefficients=1 0)
    CustomJoint hip_l: socket_parent_frame=pelvis_offset socket_child_frame=femur_l_offset
      Coordinate hip_flexion_l: default_value=-0.03490659 range=(-2.094395 2.094395) clamped=false
      Coordinate hip_adduction_l: default_value=-0.05235988 range=(-2.094395 2.094395) clamped=false
      Coordinate hip_rotation_l: default_value=0 range=(-2.094395 2.094395) clamped=false
      PhysicalOffsetFrame pelvis_offset: socket_parent=/bodyset/pelvis translation=(-0.0707 -0.0661 -0.0835)
      PhysicalOffsetFrame femur_l_offset: socket_parent=/bodyset/femur_l translation=(0 0 0)
      SpatialTransform: axes_held_at_zero=(translation1 translation2 translation3)
        TransformAxis rotation1: coordinates=hip_flexion_l axis=(0 0 1) LinearFunction(coefficients=1 0)
        TransformAxis rotation2: coordinates=hip_adduction_l axis=(-1 0 0) LinearFunction(coefficients=1 0)
        TransformAxis rotation3: coordinates=hip_rotation_l axis=(0 -1 0) LinearFunction(coefficients=1 0)
    CustomJoint knee_l: socket_parent_frame=femur_l_offset socket_child_frame=tibia_l_offset
      Coordinate knee_angle_l: default_value=0 range=(-2.094395 0.1745329) clamped=false
      PhysicalOffsetFrame femur_l_offset: socket_parent=/bodyset/femur_l translation=(0 0 0)
      PhysicalOffsetFrame tibia_l_offset: socket_parent=/bodyset/tibia_l translation=(0 0 0)
      SpatialTransform: axes_held_at_zero=(rotation2 rotation3 translation3)
        TransformAxis rotation1: coordinates=knee_angle_l axis=(0 0 1) LinearFunction(coefficients=1 0)
        TransformAxis translation1: coordinates=knee_angle_l axis=(1 0 0)
          SimmSpline: x=(-2.0944 -1.74533 -1.39626 -1.0472 -0.698132 -0.349066 -0.174533 0.197344 0.337395 0.490178 1.52146 2.0944)
              y=(-0.0032 0.00179 0.00411 0.0041 0.00212 -0.001 -0.0031 -0.005227 -0.005435 -0.005574 -0.005435 -0.00525)
        TransformAxis translation2: coordinates=knee_angle_l axis=(0 1 0)
          SimmSpline: x=(-2.0944 -1.22173 -0.523599 -0.349066 -0.174533 0.159149 2.0944)
              y=(-0.4226 -0.4082 -0.399 -0.3976 -0.3966 -0.395264 -0.396)
    CustomJoint ankle_l: socket_parent_frame=tibia_l_offset socket_child_frame=talus_l_offset
      Coordinate ankle_angle_l: default_value=0 range=(-1.570796 1.570796) clamped=false
      PhysicalOffsetFrame tibia_l_offset: socket_parent=/bodyset/tibia_l translation=(0 -0.43 0)
      PhysicalOffsetFrame talus_l_offset: socket_parent=/bodyset/talus_l translation=(0 0 0)
      SpatialTransform: axes_held_at_zero=(rotation2 rotation3 translation1 translation2 translation3)
        TransformAxis rotation1: coordinates=ankle_angle_l axis=(0.1050135 0.1740224 0.9791263)
            LinearFunction(coefficients=1 0)
    CustomJoint subtalar_l: socket_parent_frame=talus_l_offset socket_child_frame=calcn_l_offset
      Coordinate subtalar_angle_l: default_value=0 range=(-1.570796 1.570796) clamped=false locked=true
      PhysicalOffsetFrame talus_l_offset: socket_parent=/bodyset/talus_l translation=(-0.04877 -0.04195 -0.00792)
      PhysicalOffsetFrame calcn_l_offset: socket_parent=/bodyset/calcn_l translation=(0 0 0)
      SpatialTransform: axes_held_at_zero=(rotation2 rotation3 translation1 translation2 translation3)
        TransformAxis rotation1: coordinates=subtalar_angle_l axis=(-0.7871796 -0.6047475 -0.1209495)
            LinearFunction(coefficients=1 0)
    CustomJoint mtp_l: socket_parent_frame=calcn_l_offset socket_child_frame=toes_l_offset
      Coordinate mtp_angle_l: default_value=0 range=(-1.570796 1.570796) clamped=false locked=true
      PhysicalOffsetFrame calcn_l_offset: socket_parent=/bodyset/calcn_l translation=(0.1788 -0.002 -0.00108)
      PhysicalOffsetFrame toes_l_offset: socket_parent=/bodyset/toes_l translation=(0 0 0)
      SpatialTransform: axes_held_at_zero=(rotation2 rotation3 translation1 translation2 translation3)
        TransformAxis rotation1: coordinates=mtp_angle_l axis=(0.5809544 0 0.8139361) LinearFunction(coefficients=1 0)
    CustomJoint back: socket_parent_frame=pelvis_offset socket_child_frame=torso_offset
      Coordinate lumbar_extension: default_value=-0.1396263 range=(-1.570796 1.570796) clamped=false locked=true
      Coordinate lumbar_bending: default_value=0 range=(-1.570796 1.570796) clamped=false locked=true
      Coordinate lumbar_rotation: default_value=0 range=(-1.570796 1.570796) clamped=false locked=true
      PhysicalOffsetFrame pelvis_offset: socket_parent=/bodyset/pelvis translation=(-0.1007 0.0815 0)
      PhysicalOffsetFrame torso_offset: socket_parent=/bodyset/torso translation=(0 0 0)
      SpatialTransform: axes_held_at_zero=(translation1 translation2 translation3)
        TransformAxis rotation1: coordinates=lumbar_extension axis=(0 0 1) LinearFunction(coefficients=1 0)
        TransformAxis rotation2: coordinates=lumbar_bending axis=(1 0 0) LinearFunction(coefficients=1 0)
        TransformAxis rotation3: coordinates=lumbar_rotation axis=(0 1 0) LinearFunction(coefficients=1 0)
    CustomJoint ground_XoR_back: socket_parent_frame=ground_offset socket_child_frame=XoR_back_offset
      Coordinate XoR_back_tilt: default_value=0 range=(-1.570796 1.570796) clamped=false locked=true
      Coordinate XoR_back_list: default_value=0 range=(-1.570796 1.570796) clamped=false locked=true
      Coordinate XoR_back_rotation: default_value=0 range=(-1.570796 1.570796) clamped=false locked=true
      Coordinate XoR_back_tx: default_value=0 range=(-5 5) clamped=false locked=true
      Coordinate XoR_back_ty: default_value=1.1 range=(-1 2) clamped=false locked=true
      Coordinate XoR_back_tz: default_value=0 range=(-3 3) clamped=false locked=true
      PhysicalOffsetFrame ground_offset: socket_parent=/ground translation=(0 0 0)
      PhysicalOffsetFrame XoR_back_offset: socket_parent=/bodyset/XoR_back translation=(0 0 0)
      SpatialTransform:
        TransformAxis rotation1: coordinates=XoR_back_tilt axis=(0 0 1) LinearFunction(coefficients=1 0)
        TransformAxis rotation2: coordinates=XoR_back_list axis=(1 0 0) LinearFunction(coefficients=1 0)
        TransformAxis rotation3: coordinates=XoR_back_rotation axis=(0 1 0) LinearFunction(coefficients=1 0)
        TransformAxis translation1: coordinates=XoR_back_tx axis=(1 0 0) LinearFunction(coefficients=1 0)
        TransformAxis translation2: coordinates=XoR_back_ty axis=(0 1 0) LinearFunction(coefficients=1 0)
        TransformAxis translation3: coordinates=XoR_back_tz axis=(0 0 1) LinearFunction(coefficients=1 0)
    CustomJoint XoR_back_XoR_link_r: socket_parent_frame=XoR_back_offset socket_child_frame=XoR_link_r_offset
      Coordinate XoR_hip_adduction_r: default_value=0 range=(-1.570796 1.570796) clamped=false locked=true
      PhysicalOffsetFrame XoR_back_offset: socket_parent=/bodyset/XoR_back translation=(0.0931172 -0.0997257 0.194)
      PhysicalOffsetFrame XoR_link_r_offset: socket_parent=/bodyset/XoR_link_r translation=(0 0 0)
      SpatialTransform:
        TransformAxis rotation1: coordinates=XoR_hip_adduction_r axis=(1 0 0) LinearFunction(coefficients=1 0)
        TransformAxis rotation2: axis=(0 1 0)
        TransformAxis rotation3: axis=(0 0 1)
        TransformAxis translation1: axis=(1 0 0)
        TransformAxis translation2: axis=(0 1 0)
        TransformAxis translation3: axis=(0 0 1)
    CustomJoint XoR_link_r_XoR_thigh_r: socket_parent_frame=XoR_link_r_offset socket_child_frame=XoR_thigh_r_offset
      Coordinate XoR_hip_flexion_r: default_value=0 range=(-1.570796 1.570796) clamped=false
      PhysicalOffsetFrame XoR_link_r_offset: socket_parent=/bodyset/XoR_link_r translation=(0.015 -0.065 0.01)
      PhysicalOffsetFrame XoR_thigh_r_offset: socket_parent=/bodyset/XoR_thigh_r translation=(0 0 0)
      SpatialTransform:
        TransformAxis rotation1: axis=(1 0 0)
        TransformAxis rotation2: axis=(0 1 0)
        TransformAxis rotation3: coordinates=XoR_hip_flexion_r axis=(0 0 1) LinearFunction(coefficients=1 0)
        TransformAxis translation1: axis=(1 0 0)
        TransformAxis translation2: axis=(0 1 0)
        TransformAxis translation3: axis=(0 0 1)
    CustomJoint XoR_thigh_r_XoR_shank_r: socket_parent_frame=XoR_thigh_r_offset socket_child_frame=XoR_shank_r_offset
      Coordinate XoR_knee_angle_r: default_value=0 range=(-1.570796 1.570796) clamped=false
      PhysicalOffsetFrame XoR_thigh_r_offset: socket_parent=/bodyset/XoR_thigh_r translation=(0 -0.38 0.04)
      PhysicalOffsetFrame XoR_shank_r_offset: socket_parent=/bodyset/XoR_shank_r translation=(0 0 0)
      SpatialTransform:
        TransformAxis rotation1: axis=(1 0 0)
        TransformAxis rotation2: axis=(0 1 0)
        TransformAxis rotation3: coordinates=XoR_knee_angle_r axis=(0 0 1) LinearFunction(coefficients=1 0)
        TransformAxis translation1: axis=(1 0 0)
        TransformAxis translation2: axis=(0 1 0)
        TransformAxis translation3: axis=(0 0 1)
    CustomJoint XoR_shank_r_XoR_foot_r: socket_parent_frame=XoR_shank_r_offset socket_child_frame=XoR_foot_r_offset
      Coordinate XoR_ankle_angle_r: default_value=0 range=(-1.570796 1.570796) clamped=false
      PhysicalOffsetFrame XoR_shank_r_offset: socket_parent=/bodyset/XoR_shank_r translation=(0 -0.38 -0.005)
      PhysicalOffsetFrame XoR_foot_r_offset: socket_parent=/bodyset/XoR_foot_r translation=(0 0 0)
      SpatialTransform:
        TransformAxis rotation1: axis=(1 0 0)
        TransformAxis rotation2: axis=(0 1 0)
        TransformAxis rotation3: coordinates=XoR_ankle_angle_r axis=(0 0 1) LinearFunction(coefficients=1 0)
        TransformAxis translation1: axis=(1 0 0)
        TransformAxis translation2: axis=(0 1 0)
        TransformAxis translation3: axis=(0 0 1)
    CustomJoint XoR_back_XoR_link_l: socket_parent_frame=XoR_back_offset socket_child_frame=XoR_link_l_offset
      Coordinate XoR_hip_adduction_l: default_value=2.244017e-8 range=(-6.283185 6.283185) clamped=false locked=true
      PhysicalOffsetFrame XoR_back_offset: socket_parent=/bodyset/XoR_back translation=(0.0931172 -0.0997257 -0.194)
      PhysicalOffsetFrame XoR_link_l_offset: socket_parent=/bodyset/XoR_link_l translation=(0 0 0)
      SpatialTransform: axes_held_at_zero=(translation1 translation2 translation3)
        TransformAxis rotation1: axis=(0 0 1) LinearFunction(coefficients=0 0)
        TransformAxis rotation2: coordinates=XoR_hip_adduction_l axis=(1 0 0) LinearFunction(coefficients=1 0)
        TransformAxis rotation3: axis=(0 1 0) LinearFunction(coefficients=0 0)
    CustomJoint XoR_link_l_XoR_thigh_l: socket_parent_frame=XoR_link_l_offset socket_child_frame=XoR_thigh_l_offset
      Coordinate XoR_hip_flexion_l: default_value=0 range=(-1.570796 1.570796) clamped=false
      PhysicalOffsetFrame XoR_link_l_offset: socket_parent=/bodyset/XoR_link_l translation=(0.015 -0.065 -0.01)
      PhysicalOffsetFrame XoR_thigh_l_offset: socket_parent=/bodyset/XoR_thigh_l translation=(0 0 0)
      SpatialTransform:
        TransformAxis rotation1: axis=(1 0 0)
        TransformAxis rotation2: axis=(0 1 0)
        TransformAxis rotation3: coordinates=XoR_hip_flexion_l axis=(0 0 1) LinearFunction(coefficients=1 0)
        TransformAxis translation1: axis=(1 0 0)
        TransformAxis translation2: axis=(0 1 0)
        TransformAxis translation3: axis=(0 0 1)
    CustomJoint XoR_thigh_l_XoR_shank_l: socket_parent_frame=XoR_thigh_l_offset socket_child_frame=XoR_shank_l_offset
      Coordinate XoR_knee_angle_l: default_value=0 range=(-1.570796 1.570796) clamped=false
      PhysicalOffsetFrame XoR_thigh_l_offset: socket_parent=/bodyset/XoR_thigh_l translation=(0 -0.38 -0.04)
      PhysicalOffsetFrame XoR_shank_l_offset: socket_parent=/bodyset/XoR_shank_l translation=(0 0 0)
      SpatialTransform:
        TransformAxis rotation1: axis=(1 0 0)
        TransformAxis rotation2: axis=(0 1 0)
        TransformAxis rotation3: coordinates=XoR_knee_angle_l axis=(0 0 1) LinearFunction(coefficients=1 0)
        TransformAxis translation1: axis=(1 0 0)
        TransformAxis translation2: axis=(0 1 0)
        TransformAxis translation3: axis=(0 0 1)
    CustomJoint XoR_shank_l_XoR_foot_l: socket_parent_frame=XoR_shank_l_offset socket_child_frame=XoR_foot_l_offset
      Coordinate XoR_ankle_angle_l: default_value=0 range=(-1.570796 1.570796) clamped=false
      PhysicalOffsetFrame XoR_shank_l_offset: socket_parent=/bodyset/XoR_shank_l translation=(0 -0.38 0.005)
      PhysicalOffsetFrame XoR_foot_l_offset: socket_parent=/bodyset/XoR_foot_l translation=(0 0 0)
      SpatialTransform:
        TransformAxis rotation1: axis=(1 0 0)
        TransformAxis rotation2: axis=(0 1 0)
        TransformAxis rotation3: coordinates=XoR_ankle_angle_l axis=(0 0 1) LinearFunction(coefficients=1 0)
        TransformAxis translation1: axis=(1 0 0)
        TransformAxis translation2: axis=(0 1 0)
        TransformAxis translation3: axis=(0 0 1)
  ForceSet:
    BushingForce XoR_foot_r_bushing: socket_frame1=XoR_foot_r_cuff socket_frame2=calcn_r_cuff
        rotational_stiffness=(100 100 100) [Nm/rad] translational_stiffness=(10000 10000 10000) [N/m]
        rotational_damping=(100 100 100) [Nm/(rad/s)] translational_damping=(1 1 1) [N/(m/s)]
      PhysicalOffsetFrame XoR_foot_r_cuff: socket_parent=/bodyset/XoR_foot_r translation=(0 -0.08 -0.08)
      PhysicalOffsetFrame calcn_r_cuff: socket_parent=/bodyset/calcn_r translation=(0.0627636 -0.013806 0.0214821)
          orientation=(0.0524 0 0.0349) [radians]
    BushingForce XoR_foot_l_bushing: socket_frame1=XoR_foot_l_cuff socket_frame2=calcn_l_cuff
        rotational_stiffness=(100 100 100) translational_stiffness=(10000 10000 10000) rotational_damping=(100 100 100)
        translational_damping=(1 1 1)
      PhysicalOffsetFrame XoR_foot_l_cuff: socket_parent=/bodyset/XoR_foot_l translation=(0 -0.08 0.08)
      PhysicalOffsetFrame calcn_l_cuff: socket_parent=/bodyset/calcn_l translation=(0.0627636 -0.013806 -0.0214822)
          orientation=(-0.0524 0 0.0349)
    BushingForce XoR_shank_r_bushing: socket_frame1=XoR_shank_r_cuff socket_frame2=shank_r_cuff
        rotational_stiffness=(10 10 10) translational_stiffness=(1000 1000 1000) rotational_damping=(0 0 0)
        translational_damping=(100 100 100)
      PhysicalOffsetFrame XoR_shank_r_cuff: socket_parent=/bodyset/XoR_shank_r translation=(0 -0.2 -0.06)
      PhysicalOffsetFrame shank_r_cuff: socket_parent=/bodyset/tibia_r translation=(0.00491969 -0.227579 0.0679669)
          orientation=(0.0524 0 0.0349)
    BushingForce XoR_shank_l_bushing: socket_frame1=XoR_shank_l_cuff socket_frame2=shank_l_cuff
        rotational_stiffness=(10 10 10) translational_stiffness=(1000 1000 1000) rotational_damping=(0 0 0)
        translational_damping=(100 100 100)
      PhysicalOffsetFrame XoR_shank_l_cuff: socket_parent=/bodyset/XoR_shank_l translation=(0 -0.2 0.06)
      PhysicalOffsetFrame shank_l_cuff: socket_parent=/bodyset/tibia_l translation=(0.00491969 -0.227579 -0.0679669)
          orientation=(-0.0524 0 0.0349)
    BushingForce XoR_thigh_r_bushing: socket_frame1=XoR_thigh_r_cuff socket_frame2=thigh_r_cuff
        rotational_stiffness=(10 10 10) translational_stiffness=(1000 1000 1000) rotational_damping=(0 0 0)
        translational_damping=(100 100 100)
      PhysicalOffsetFrame XoR_thigh_r_cuff: socket_parent=/bodyset/XoR_thigh_r translation=(0 -0.2 -0.03)
      PhysicalOffsetFrame thigh_r_cuff: socket_parent=/bodyset/femur_r translation=(-0.012842 -0.243628 0.0778562)
          orientation=(0.0524 0 0.0349)
    BushingForce XoR_thigh_l_bushing: socket_frame1=XoR_thigh_l_cuff socket_frame2=thigh_l_cuff
        rotational_stiffness=(10 10 10) translational_stiffness=(1000 1000 1000) rotational_damping=(0 0 0)
        translational_damping=(100 100 100)
      PhysicalOffsetFrame XoR_thigh_l_cuff: socket_parent=/bodyset/XoR_thigh_l translation=(0 -0.2 0.03)
      PhysicalOffsetFrame thigh_l_cuff: socket_parent=/bodyset/femur_l translation=(-0.012842 -0.243628 -0.0778562)
          orientation=(-0.0524 0 0.0349)
    CoordinateActuator hip_motor_r: coordinate=XoR_hip_flexion_r optimal_force=20
    CoordinateActuator knee_motor_r: coordinate=XoR_knee_angle_r optimal_force=20
    CoordinateActuator ankle_motor_r: coordinate=XoR_ankle_angle_r optimal_force=20
    CoordinateActuator hip_motor_l: coordinate=XoR_hip_flexion_l optimal_force=20
    CoordinateActuator knee_motor_l: coordinate=XoR_knee_angle_l optimal_force=20
    CoordinateActuator ankle_motor_l: coordinate=XoR_ankle_angle_l optimal_force=20
  MarkerSet:
    Marker reference: ground (0 0 0)
    Marker XoR_foot_r_bushing_marker: XoR_foot_r (0 -0.08 -0.08)
    Marker calcn_r_bushing_marker: calcn_r (0.06276356 -0.013806 0.02148214)
    Marker XoR_foot_l_bushing_marker: XoR_foot_l (-1.387779e-17 -0.08 0.08)
    Marker calcn_l_bushing_marker: calcn_l (0.06276356 -0.013806 -0.02148216)
    Marker XoR_shank_r_bushing_marker: XoR_shank_r (0 -0.2 -0.06)
    Marker shank_r_bushing_marker: tibia_r (0.00491969 -0.227579 0.0679669)
    Marker XoR_shank_l_bushing_marker: XoR_shank_l (0 -0.2 0.06)
    Marker shank_l_bushing_marker: tibia_l (0.004919686 -0.2275789 -0.06796695)
    Marker XoR_thigh_r_bushing_marker: XoR_thigh_r (0 -0.2 -0.03)
    Marker thigh_r_bushing_marker: femur_r (-0.01284198 -0.2436282 0.07785619)
    Marker XoR_thigh_l_bushing_marker: XoR_thigh_l (0 -0.2 0.03)
    Marker thigh_l_bushing_marker: femur_l (-0.01284198 -0.2436282 -0.07785619)
